// SBML level 3 version 1

model kouril4()

  // Compartments:
  compartment default = 1;  // 0-D

  // Species:
  species ADP in default = 0;  // kegg.compound:C00008 CHEBI:16761
  species ATP in default = 10;  // kegg.compound:C00002 CHEBI:15422
  species BPG in default = 0;  // kegg.compound:C00236 CHEBI:16001
  species P3G in default = 4;
  species pep in default = 5;
  species pyr in default = 0;

  // Parameters:
  KeqPGK = 3200;
  KmPGKADP = 0.2;
  KmPGKATP = 0.3;
  KmPGKBPG = 0.003;
  KmPGKP3G = 0.53;
  VmPGK = 4.61;
  kPK = 50;

  // Reactions:
  v1: P3G + ATP -> BPG + ADP; -(VmPGK*(KeqPGK*BPG*ADP - ATP*P3G))/(KmPGKATP*KmPGKP3G*(1 + ADP/KmPGKADP + ATP/KmPGKATP)*(1 + BPG/KmPGKBPG + P3G/KmPGKP3G));
  v2: pep + ADP -> pyr + ATP; kPK*ADP*pep;
end
